# Угол 15 градусов
cθ := cos(15*π/180) = 0.965926
sθ := sin(15*π/180) = 0.258819
# Без угла
cθ := 1
sθ := 0
R1 := 0.07  # м
delta := R1/2 = 0.035  # м
# Длины звеньев:
l1 := 0.15
l2 := 0.4
l3 := 0.3
l4 := 0.1
l5 := 0.1
l6 := 0.1
# Внешний радиус вала:
# Толщина трубки:
h := 0.003
# Площадь:
S1(R1) := π*R1^2 - π*(R1 - h)^2
S2(R2) := π*R2^2 - π*(R2 - h)^2
S3(R3) := π*R3^2 - π*(R3 - h)^2
S4(R4) := π*R4^2 - π*(R4 - h)^2
S5(R5) := π*R5^2 - π*(R5 - h)^2
S6(R6) := π*R6^2 - π*(R6 - h)^2
# Плотность:
p := 2700
# Массы звеньев:
M1(R1) := S1(R1)*l1*p
M2(R2) := S2(R2)*l2*p
M5(R5) := S5(R5)*l5*p
M3(R3) := S3(R3)*l3*p
M4(R4) := S4(R4)*l4*p
M6(R6) := S6(R6)*l6*p
# Масса груза
ML := 5 + 1.5 + 0.4 + 1.2  # 5 кг - груз
# 1.5 кг - масса схвата без привода
# 0.4 кг - масса двигателя
# 1.2 кг - масса редуктора
# Силы действующие на сочленения:
g := 9.8
F1(R1) := M1(R1)*g
F2(R2) := M2(R2)*g
F3(R3) := M3(R3)*g
F4(R4) := M4(R4)*g
FL := ML*g = 79.38
F5(R5) := M5(R5)*g
F6(R6) := M6(R6)*g
# На нулевой элемент не смотрим :)
ϕ := 1  # Угол поворота шарнира
ω := [42; 0.2; 0.2; 0.2; 0.1; 0.2; 0.6]  # Средняя скорость вращения
T := ϕ/ω
# Время движения шарнира
τ := T*0.2 = [0.0047619; 1; 1; 1; 2; 1; 0.333333]  # Время разгона и торможения
ωh := ϕ/(T - τ) = [52.5; 0.25; 0.25; 0.25; 0.125; 0.25; 0.75]
# Установившаяся скорость
ε := ωh/τ = [11025; 0.25; 0.25; 0.25; 0.0625; 0.25; 2.25]  # Угловое ускорение
# Расчет для 6 звена:
# Динамика:
J6(R6) := (M6(R6)*R6^2)/2
Jsum6(R6) := J6(R6)
M6din(R6) := Jsum6(R6)*ε[6]
# Статика:
M6stat(R6) := 0
M6sum(R6) := M6din(R6) + M6stat(R6)
R6 := 0, 0.010 .. 0.050
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R6 := 0.035
m6joint := 0.086 + 0.46  # Это масса всего привода
# Радиус здесь и далее можно выбрать любой, я пока вот так пристрелочно взял
P[6] := M6sum(R6)*ωh[6] = 0.000176222  # Вт
# Расчет для 5 звена:
# Динамика:
J6(R6) := 1*M6(R6)*R6^2/4 + 1*M6(R6)*l6^2/12 + M6(R6)*(l6/2 + l5)^2
J6joint := m6joint*l5^2
JL := ML*(l6 + l5)^2
J5(R5) := 1*M5(R5)*R5^2/4 + 1*M5(R5)*l5^2/12 + M5(R5)*(l5/2)^2
Jsum5(R5) := J6(R6) + JL + J5(R5) + J6joint
M5din(R5) := Jsum5(R5)*ε[5]
# Статика:
M5stat(R5) := cθ*M6(R6)*g*(l6/2 + l5) + cθ*ML*g*(l6 + l5) + cθ*m6joint*g*l5 + cθ*M5(R5)*g*l5/2
R5 := 0, 0.010 .. 0.050
M5sum(R5) := M5din(R5) + M5stat(R5)
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R5 := 0.035
m5joint := 0.46 + 0.086
P[5] := M5sum(R5)*ωh[5] = 4.20719  # Вт
# Расчет для 4 звена:
# Динамика:
JL := ML*delta^2
J6(R6) := (M6(R6)*R6^2)/2 + M6(R6)*delta^2
J6joint := m6joint*delta^2
J5(R5) := (M5(R5)*R5^2)/2 + M5(R5)*delta^2
J5joint := m5joint*(delta/2)^2
J4(R4) := (M4(R4)*R4^2)/2
Jsum4(R4) := J6(R6) + J5(R5) + J4(R4) + JL + J6joint + J5joint
M4din(R4) := Jsum4(R4)*ε[4]
# Статика:
M4stat(R4) := cθ*M6(R6)*g*delta + cθ*ML*g*delta + cθ*M5(R5)*g*delta + cθ*m6joint*g*delta + cθ*m5joint*g*(delta/2)
R4 := 0, 0.010 .. 0.050
M4sum(R4) := M4din(R4) + M4stat(R4)
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R4 := 0.04
m4joint := 0.65 + 0.086
P[4] := M4sum(R4)*ωh[4] = 0.397112  # Вт
# Расчет для 3 звена:
# Динамика:
J6(R6) := 1*M6(R6)*R6^2/4 + 1*M6(R6)*l6^2/12 + M6(R6)*(l6/2 + l5 + l4 + l3)^2
J6joint := m6joint*(l5 + l4 + l3)^2
J5joint := m5joint*(l4 + l3)^2
J4joint := m4joint*l3^2
JL := ML*(l6 + l5 + l4 + l3)^2
J5(R5) := 1*M5(R5)*R5^2/4 + 1*M5(R5)*l5^2/12 + M5(R5)*(l5/2 + l4 + l3)^2
J4(R4) := 1*M4(R4)*R4^2/4 + 1*M4(R4)*l4^2/12 + M4(R4)*(l4/2 + l3)^2
J3(R3) := 1*M3(R3)*R3^2/4 + 1*M3(R3)*l3^2/12 + M3(R3)*(l3/2)^2
Jsum3(R3) := J6(R6) + JL + J5(R5) + J4(R4) + J3(R3) + J6joint + J5joint + J4joint
M3din(R3) := Jsum3(R3)*ε[3]
# Статика:
M3stat(R3) := cθ*M6(R6)*g*(l6/2 + l5 + l4 + l3) + cθ*ML*g*(l6 + l5 + l4 + l3) + cθ*M5(R5)*g*(l5/2 + l4 + l3) + cθ*M4(R4)*g*(l4/2 + l3) + cθ*M3(R3)*g*l3/2 + cθ*m6joint*g*(l5 + l4 + l3) + cθ*m5joint*g*(l4 + l3) + cθ*m4joint*g*l3
R3 := 0, 0.010 .. 0.050
M3sum(R3) := M3din(R3) + M3stat(R3)
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R3 := 0.0475
m3joint := 0.4 + 1.2
P[3] := M3sum(R3)*ωh[3] = 14.7044  # Вт
# Расчет для 2 звена:
# Динамика:
J6(R6) := 1*M6(R6)*R6^2/4 + 1*M6(R6)*l6^2/12 + M6(R6)*(l6/2 + l5 + l4 + l3 + l2)^2
J6joint := m6joint*(l5 + l4 + l3 + l2)^2
J5joint := m5joint*(l4 + l3 + l2)^2
J4joint := m4joint*(l3 + l2)^2
J3joint := m3joint*l2^2
JL := ML*(l6 + l5 + l4 + l3 + l2)^2
J5(R5) := 1*M5(R5)*R5^2/4 + 1*M5(R5)*l5^2/12 + M5(R5)*(l5/2 + l4 + l3 + l2)^2
J4(R4) := 1*M4(R4)*R4^2/4 + 1*M4(R4)*l4^2/12 + M4(R4)*(l4/2 + l3 + l2)^2
J3(R3) := 1*M3(R3)*R3^2/4 + 1*M3(R3)*l3^2/12 + M3(R3)*(l3/2 + l2)^2
J2(R2) := 1*M2(R2)*R2^2/4 + 1*M2(R2)*l2^2/12 + M2(R2)*(l2/2)^2
Jsum2(R2) := J6(R6) + JL + J5(R5) + J4(R4) + J3(R3) + J2(R2) + J6joint + J5joint + J4joint + J3joint
M2din(R2) := Jsum2(R2)*ε[2]
# Статика:
M2stat(R2) := cθ*M6(R6)*g*(l6/2 + l5 + l4 + l3 + l2) + cθ*ML*g*(l6 + l5 + l4 + l3 + l2) + cθ*M5(R5)*g*(l5/2 + l4 + l3 + l2) + cθ*M4(R4)*g*(l4/2 + l3 + l2) + cθ*M3(R3)*g*(l3/2 + l2) + cθ*M2(R2)*g*l2/2 + cθ*m6joint*g*(l5 + l4 + l3 + l2) + cθ*m5joint*g*(l4 + l3 + l2) + cθ*m4joint*g*(l3 + l2) + cθ*m3joint*g*l2
R2 := 0, 0.010 .. 0.050
M2sum(R2) := M2din(R2) + M2stat(R2)
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R2 := 0.06
m2joint := 2.4 + 0.4
P[2] := M2sum(R2)*ωh[2] = 28.2274  # Вт
# Расчет для 1 звена:
# Динамика:
J6(R6) := 1*M6(R6)*R6^2/4 + 1*M6(R6)*l6^2/12 + M6(R6)*(l6/2 + l5 + l4 + l3 + l2)^2
JL := ML*(l6 + l5 + l4 + l3 + l2)^2
J6joint := m6joint*(l5 + l4 + l3 + l2)^2
J5joint := m5joint*(l4 + l3 + l2)^2
J4joint := m4joint*(l3 + l2)^2
J3joint := m3joint*l2^2
J5(R5) := 1*M5(R5)*R5^2/4 + 1*M5(R5)*l5^2/12 + M5(R5)*(l5/2 + l4 + l3 + l2)^2
J4(R4) := 1*M4(R4)*R4^2/4 + 1*M4(R4)*l4^2/12 + M4(R4)*(l4/2 + l3 + l2)^2
J3(R3) := 1*M3(R3)*R3^2/4 + 1*M3(R3)*l3^2/12 + M3(R3)*(l3/2 + l2)^2
J2(R2) := 1*M2(R2)*R2^2/4 + 1*M2(R2)*l2^2/12 + M2(R2)*(l2/2)^2
J1(R1) := M1(R1)*R1^2/2
Jsum1(R1) := J6(R6) + JL + J5(R5) + J4(R4) + J3(R3) + J2(R2) + J1(R1) + (J6joint + J5joint + J4joint + J3joint)
M1din(R1) := Jsum1(R1)*ε[1]
# Статика:
M1stat(R1) := sθ*M6(R6)*g*delta + sθ*ML*g*delta + sθ*M5(R5)*g*delta + sθ*M2(R2)*g*delta + sθ*m6joint*g*delta + sθ*m5joint*g*(delta/2) + sθ*m3joint*g*(delta/2) + sθ*m2joint*g*(delta/2)
R1 := 0, 0.010 .. 0.050
M1sum(R1) := M1din(R1) + M1stat(R1)
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R1 := 0.02
P[1] := M1sum(R1)*ωh[1] = 0.636186  # Вт
Итого
# Для звеньев по возрастанию от 0 | Максимум
# Скорость двигателей, об/минуту | Передаточное число редуктора | Скорость итоговая, радиан/секунду
# Момент для двигателей
P*1.3 = [0; 0.827042; 36.6956; 19.1157; 0.516246; 5.46935; 0.000229088]  # Вт
Msum := [0; M1sum(R1); M2sum(R2); M3sum(R3); M4sum(R4); M5sum(R5); M6sum(R6)]*1.3 = [0; 3.30817; 146.782; 76.4627; 4.12997; 21.8774; 0.000305451]  # Н*м
v := [42; 200; 200; 200; 100; 200; 333]
i := [42; 100; 100; 100; 100; 100; 50]
vfin := v*360*π/(i*60*180) = [0.10472; 0.20944; 0.20944; 0.20944; 0.10472; 0.20944; 0.697434]
Mpeak := Msum/i = [0; 0.0330817; 1.46782; 0.764627; 0.0412997; 0.218774; 6.10902e-6]
# [component: outputs Result]
# [component: outputs Result]
# [component: outputs йййй]
# 5 | 4 | 3 | 2 | 1
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6
# https://harmonicdrive.de/fileadmin/user_upload/2014_11_ED_1019646_CSD_2UH_2UF_2.pdf
# еще вариант тут
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# https://harmonicdrive.de/fileadmin/user_upload/2014_12_ED_1019649_CSF_Mini.pdf
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# https://harmonicdrive.de/fileadmin/user_upload/2015_06_ED_1019818_RSFmini.pdf
# https://harmonicdrive.de/fileadmin/user_upload/ED_FHA_C_mini_E_1018855_07_2019_V05.pdf
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# Расчет схвата
mw := 5  # масса груза
Р - 5 - (-54) - 101 - 88
k := 1.3  # Запас
C := 10  # Безразмерный коэф-т для электромеханических
Sтр := k*C*mw*g = 637  # Н  # Требуемое значение усилия, упрощенная формула
Mсхват := Sтр*0.1 = 63.7
# Как на 4 звене
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63.7/100 = 0.637
# Говорим, что у нас такой схват потому что
Энкодеры
# https://skbis.ru/catalog/rotary/absolute-rotary-encoders/lir-da136a
# Вот такие, +-150 секунд на каждом приводе
Итого
error := 150*7/3600 = 0.291667  # градуса
