# Угол 15 градусов
cθ := cos(15*π/180) = 0.965926
sθ := sin(15*π/180) = 0.258819
# Длины звеньев:
l1 := 0.15
l2 := 0.4
l3 := 0.3
l4 := 0.1
l5 := 0.1
l6 := 0.1
# Внешний радиус вала:
# Толщина трубки:
h := 0.004  # Задаем сами!
# Площадь:
S1(R1) := π*R1^2 - π*(R1 - h)^2
S2(R2) := π*R2^2 - π*(R2 - h)^2
S3(R3) := π*R3^2 - π*(R3 - h)^2
S4(R4) := π*R4^2 - π*(R4 - h)^2
S5(R5) := π*R5^2 - π*(R5 - h)^2
S6(R6) := π*R6^2 - π*(R6 - h)^2
# Плотность:
p := 7850  # Можно подобрать другой материал
# Массы звеньев:
M1(R1) := S1(R1)*l1*p
M2(R2) := S2(R2)*l2*p
M5(R5) := S5(R5)*l5*p
M3(R3) := S3(R3)*l3*p
M4(R4) := S4(R4)*l4*p
M6(R6) := S6(R6)*l6*p
# Масса груза
ML := 5 + 2.5
# Силы действующие на сочленения:
g := 9.8
F1(R1) := M1(R1)*g
F2(R2) := M2(R2)*g
F3(R3) := M3(R3)*g
F4(R4) := M4(R4)*g
FL := ML*g = 73.5
F5(R5) := M5(R5)*g
F6(R6) := M6(R6)*g
ω := 0.44  # Средня скорость вращения
ω1 := ω
ω2 := ω
ω3 := ω
ω4 := ω
ω5 := ω
ω6 := ω
ϕ := 1  # Угол поворота шарнира
T := ϕ/ω = 2.27273  # Время движения шарнира
τ := T*0.2 = 0.454545  # Время разгона и торможения
ωh := ϕ/(T - τ) = 0.55  # Установившаяся скорость
ε := ωh/τ  # Угловое ускорение
ε1 := ε
ε2 := ε
ε3 := ε
ε4 := ε
ε5 := ε
ε6 := ε
# Расчет для 6 звена:
# Динамика:
J6(R6) := 1*M6(R6)*R6^2/4 + 1*M6(R6)*l6^2/12 + M6(R6)*(l6/2)^2
JL6 := ML*l6^2
Jsum6(R6) := J6(R6) + JL6
M6din(R6) := Jsum6(R6)*ε6
# Статика:
M6stat(R6) := cθ*M6(R6)*g*l6/2 + cθ*ML*g*l6
R6 := 0, 0.010 .. 0.050
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R6 := 0.02
m6joint := 4  # Это масса всего привода
Суммарный
# Радиус здесь и далее можно выбрать любой, я пока вот так пристрелочно взял
Msum[6] := M6stat(R6) + M6din(R6) = 7.35986  # Н*м
P[6] := Msum[6]*ωh = 4.04792  # Вт
# Расчет для 5 звена:
# Динамика:
J6(R6) := 1*M6(R6)*R6^2/4 + 1*M6(R6)*l6^2/12 + M6(R6)*(l6/2 + l5)^2
J6joint := m6joint*l5^2
JL6 := ML*(l6 + l5)^2
J5(R5) := 1*M5(R5)*R5^2/4 + 1*M5(R5)*l5^2/12 + M5(R5)*(l5/2)^2
Jsum5(R5) := J6(R6) + JL6 + J5(R5) + J6joint
M5din(R5) := Jsum5(R5)*ε5
# Статика:
M5stat(R5) := cθ*M6(R6)*g*(l6/2 + l5) + cθ*ML*g*(l6 + l5) + cθ*m6joint*g*l5 + cθ*M5(R5)*g*l5/2
R5 := 0, 0.010 .. 0.050
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R5 := 0.02
m5joint := 4
Суммарный
# Радиус здесь и далее можно выбрать любой, я пока вот так пристрелочно взял
Msum[5] := M5stat(R5) + M5din(R5) = 19.0808  # Н*м
P[5] := Msum[5]*ωh = 10.4944  # Вт
# Расчет для 4 звена:
# Динамика:
J6(R6) := 1*M6(R6)*R6^2/4 + 1*M6(R6)*l6^2/12 + M6(R6)*(l6/2 + l5 + l4)^2
J6joint := m6joint*(l5 + l4)^2
J5joint := m5joint*l4^2
JL6 := ML*(l6 + l5 + l4)^2
J5(R5) := 1*M5(R5)*R5^2/4 + 1*M5(R5)*l5^2/12 + M5(R5)*(l5/2 + l4)^2
J4(R4) := 1*M4(R4)*R4^2/4 + 1*M4(R4)*l4^2/12 + M4(R4)*(l4/2)^2
Jsum4(R4) := J6(R6) + JL6 + J5(R5) + J4(R4) + J6joint + J5joint
M4din(R4) := Jsum4(R4)*ε4
# Статика:
M4stat(R4) := cθ*M6(R6)*g*(l6/2 + l5 + l4) + cθ*ML*g*(l6 + l5 + l4) + cθ*M5(R5)*g*(l5/2 + l4) + cθ*M4(R4)*g*l4/2 + cθ*m6joint*g*(l5 + l4) + cθ*m5joint*g*l4
R4 := 0, 0.010 .. 0.050
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R4 := 0.02
m4joint := 4
Суммарный
# Радиус здесь и далее можно выбрать любой, я пока вот так пристрелочно взял
Msum[4] := M4stat(R4) + M4din(R4) = 35.2682  # Н*м
P[4] := Msum[4]*ωh = 19.3975  # Вт
# Расчет для 3 звена:
# Динамика:
J6(R6) := 1*M6(R6)*R6^2/4 + 1*M6(R6)*l6^2/12 + M6(R6)*(l6/2 + l5 + l4 + l3)^2
J6joint := m6joint*(l5 + l4 + l3)^2
J5joint := m5joint*(l4 + l3)^2
J4joint := m4joint*l3^2
JL6 := ML*(l6 + l5 + l4 + l3)^2
J5(R5) := 1*M5(R5)*R5^2/4 + 1*M5(R5)*l5^2/12 + M5(R5)*(l5/2 + l4 + l3)^2
J4(R4) := 1*M4(R4)*R4^2/4 + 1*M4(R4)*l4^2/12 + M4(R4)*(l4/2 + l3)^2
J3(R3) := 1*M3(R3)*R3^2/4 + 1*M3(R3)*l3^2/12 + M3(R3)*(l3/2)^2
Jsum3(R3) := J6(R6) + JL6 + J5(R5) + J4(R4) + J3(R3) + J6joint + J5joint + J4joint
M3din(R3) := Jsum3(R3)*ε3
# Статика:
M3stat(R3) := cθ*M6(R6)*g*(l6/2 + l5 + l4 + l3) + cθ*ML*g*(l6 + l5 + l4 + l3) + cθ*M5(R5)*g*(l5/2 + l4 + l3) + cθ*M4(R4)*g*(l4/2 + l3) + cθ*M3(R3)*g*l3/2 + cθ*m6joint*g*(l5 + l4 + l3) + cθ*m5joint*g*(l4 + l3) + cθ*m4joint*g*l3
R3 := 0, 0.010 .. 0.050
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R3 := 0.02
m3joint := 4
Суммарный
# Радиус здесь и далее можно выбрать любой, я пока вот так пристрелочно взял
Msum[3] := M3stat(R3) + M3din(R3) = 100.082  # Н*м
P[3] := Msum[3]*ωh = 55.0451  # Вт
# Расчет для 2 звена:
# Динамика:
J6(R6) := 1*M6(R6)*R6^2/4 + 1*M6(R6)*l6^2/12 + M6(R6)*(l6/2 + l5 + l4 + l3 + l2)^2
J6joint := m6joint*(l5 + l4 + l3 + l2)^2
J5joint := m5joint*(l4 + l3 + l2)^2
J4joint := m4joint*(l3 + l2)^2
J3joint := m3joint*l2^2
JL6 := ML*(l6 + l5 + l4 + l3 + l2)^2
J5(R5) := 1*M5(R5)*R5^2/4 + 1*M5(R5)*l5^2/12 + M5(R5)*(l5/2 + l4 + l3 + l2)^2
J4(R4) := 1*M4(R4)*R4^2/4 + 1*M4(R4)*l4^2/12 + M4(R4)*(l4/2 + l3 + l2)^2
J3(R3) := 1*M3(R3)*R3^2/4 + 1*M3(R3)*l3^2/12 + M3(R3)*(l3/2 + l2)^2
J2(R2) := 1*M2(R2)*R2^2/4 + 1*M2(R2)*l2^2/12 + M2(R2)*(l2/2)^2
Jsum2(R2) := J6(R6) + JL6 + J5(R5) + J4(R4) + J3(R3) + J2(R2) + J6joint + J5joint + J4joint + J3joint
M2din(R2) := Jsum2(R2)*ε2
# Статика:
M2stat(R2) := cθ*M6(R6)*g*(l6/2 + l5 + l4 + l3 + l2) + cθ*ML*g*(l6 + l5 + l4 + l3 + l2) + cθ*M5(R5)*g*(l5/2 + l4 + l3 + l2) + cθ*M4(R4)*g*(l4/2 + l3 + l2) + cθ*M3(R3)*g*(l3/2 + l2) + cθ*M2(R2)*g*l2/2 + cθ*m6joint*g*(l5 + l4 + l3 + l2) + cθ*m5joint*g*(l4 + l3 + l2) + cθ*m4joint*g*(l3 + l2) + cθ*m3joint*g*l2
R2 := 0, 0.010 .. 0.050
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R2 := 0.02
m2joint := 4
Суммарный
# Радиус здесь и далее можно выбрать любой, я пока вот так пристрелочно взял
Msum[2] := M2stat(R2) + M2din(R2) = 214.496  # Н*м
P[2] := Msum[2]*ωh = 117.973  # Вт
# Расчет для 1 звена:
# Динамика:
J6(R6) := 1*M6(R6)*R6^2/4 + 1*M6(R6)*l6^2/12 + M6(R6)*(l6/2 + l5 + l4 + l3 + l2)^2
JL6 := ML*(l6 + l5 + l4 + l3 + l2)^2
J6joint := m6joint*(l5 + l4 + l3 + l2)^2
J5joint := m5joint*(l4 + l3 + l2)^2
J4joint := m4joint*(l3 + l2)^2
J3joint := m3joint*l2^2
J5(R5) := 1*M5(R5)*R5^2/4 + 1*M5(R5)*l5^2/12 + M5(R5)*(l5/2 + l4 + l3 + l2)^2
J4(R4) := 1*M4(R4)*R4^2/4 + 1*M4(R4)*l4^2/12 + M4(R4)*(l4/2 + l3 + l2)^2
J3(R3) := 1*M3(R3)*R3^2/4 + 1*M3(R3)*l3^2/12 + M3(R3)*(l3/2 + l2)^2
J2(R2) := 1*M2(R2)*R2^2/4 + 1*M2(R2)*l2^2/12 + M2(R2)*(l2/2)^2
J1(R1) := M1(R1)*R1^2
Jsum1(R1) := J6(R6) + JL6 + J5(R5) + J4(R4) + J3(R3) + J2(R2) + J1(R1) + (J6joint + J5joint + J4joint + J3joint)
M1din(R1) := Jsum1(R1)*ε1
# Статика:
M1statx(R1) := cθ*M6(R6)*g*(l6/2 + l5 + l4 + l3 + l2) + cθ*ML*g*(l6 + l5 + l4 + l3 + l2) + cθ*M5(R5)*g*(l5/2 + l4 + l3 + l2) + cθ*M4(R4)*g*(l4/2 + l3 + l2) + cθ*M3(R3)*g*(l3/2 + l2) + cθ*M2(R2)*g*(l2/2) + cθ*m6joint*g*(l5 + l4 + l3 + l2) + cθ*m5joint*g*(l4 + l3 + l2) + cθ*m4joint*g*(l3 + l2) + cθ*m3joint*g*l2
M1staty(R1) := sθ*M6(R6)*g*l1 + sθ*ML*g*l1 + sθ*M5(R5)*g*l1 + sθ*M4(R4)*g*l1 + sθ*M3(R3)*g*l1 + sθ*M2(R2)*g*l1 + sθ*M1(R1)*g*(l1/2) + sθ*m6joint*g*l1 + sθ*m5joint*g*l1 + sθ*m4joint*g*l1 + sθ*m3joint*g*l1 + sθ*m2joint*g*l1
M1stat(R1) := M1statx(R1) + M1staty(R1)
R1 := 0, 0.010 .. 0.050
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R1 := 0.02
Суммарный
# Радиус здесь и далее можно выбрать любой, я пока вот так пристрелочно взял
Msum[1] := M1stat(R1) + M1din(R1) = 226.411  # Н*м
P[1] := Msum[1]*ωh = 124.526  # Вт
# Итого | Для звеньев по возрастанию от 0
P = [0; 124.526; 117.973; 55.0451; 19.3975; 10.4944; 4.04792]  # Вт
Msum = [0; 226.411; 214.496; 100.082; 35.2682; 19.0808; 7.35986]  # Н*м
