# Длины звеньев: | Надо сделать нормальными!
l1 := 1
l2 := 1
l3 := 1
l4 := 1
l5 := 1
l6 := 1
# Внешний радиус вала:
# Толщина трубки:
h := 0.004  # Задаем сами!
# Площадь:
S1(R1) := π*R1^2 - π*(R1 - h)^2
S2(R2) := π*R2^2 - π*(R2 - h)^2
S3(R3) := π*R3^2 - π*(R3 - h)^2
S4(R4) := π*R4^2 - π*(R4 - h)^2
S5(R5) := π*R5^2 - π*(R5 - h)^2
S6(R6) := π*R6^2 - π*(R6 - h)^2
# Плотность:
p := 7850  # Можно подобрать другой материал
# Массы звеньев:
M1(R1) := S1(R1)*l1*p
M2(R2) := S2(R2)*l2*p
M5(R5) := S5(R5)*l5*p
M3(R3) := S3(R3)*l3*p
M4(R4) := S4(R4)*l4*p
M6(R6) := S6(R6)*l6*p
# Масса груза
ML := 5 + 2.5
# Силы действующие на сочленения:
g := 9.8
F1(R1) := M1(R1)*g
F2(R2) := M2(R2)*g
F3(R3) := M3(R3)*g
F4(R4) := M4(R4)*g
FL := ML*g = 73.5
F5(R5) := M5(R5)*g
F6(R6) := M6(R6)*g
ω := 0.44  # Средня скорость вращения
ω1 := ω
ω2 := ω
ω3 := ω
ω4 := ω
ω5 := ω
ω6 := ω
ϕ := 1  # Угол поворота шарнира
T := ϕ/ω = 2.27273  # Время движения шарнира
τ := T*0.2 = 0.454545  # Время разгона и торможения
ωh := ϕ/(T - τ) = 0.55  # Установившаяся скорость
ε := ωh/τ  # Угловое ускорение
ε1 := ε
ε2 := ε
ε3 := ε
ε4 := ε
ε5 := ε
ε6 := ε
# Расчет для 6 звена:
# Динамика:
J6(R6) := 1*M6(R6)*R6^2/4 + 1*M6(R6)*l6^2/12 + M6(R6)*(l6/2)^2
JL6 := ML*l6^2
Jsum6(R6) := J6(R6) + JL6
M6din(R6) := Jsum6(R6)*ε6
# Статика:
M6stat(R6) := M6(R6)*g*l6/2 + ML*g*l6
R6 := 0, 0.010 .. 0.050
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R6 := 0.02
m6joint := 4  # Это масса всего привода
# Расчет для 5 звена:
# Динамика:
J6(R6) := 1*M6(R6)*R6^2/4 + 1*M6(R6)*l6^2/12 + M6(R6)*(l6/2 + l5)^2
J6joint := m6joint*l5^2
JL6 := ML*(l6 + l5)^2
J5(R5) := 1*M5(R5)*R5^2/4 + 1*M5(R5)*l5^2/12 + M5(R5)*(l5/2)^2
Jsum5(R5) := J6(R6) + JL6 + J5(R5) + J6joint
M5din(R5) := Jsum5(R5)*ε5
# Статика:
M5stat(R5) := M6(R6)*g*(l6/2 + l5) + ML*g*(l6 + l5) + m6joint*g*l5 + M5(R5)*g*l5/2
R5 := 0, 0.010 .. 0.050
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R5 := 0.02
m5joint := 4
# Расчет для 4 звена:
# Динамика:
J6(R6) := 1*M6(R6)*R6^2/4 + 1*M6(R6)*l6^2/12 + M6(R6)*(l6/2 + l5 + l4)^2
J6joint := m6joint*(l5 + l4)^2
J5joint := m5joint*l4^2
JL6 := ML*(l6 + l5 + l4)^2
J5(R5) := 1*M5(R5)*R5^2/4 + 1*M5(R5)*l5^2/12 + M5(R5)*(l5/2 + l4)^2
J4(R4) := 1*M4(R4)*R4^2/4 + 1*M4(R4)*l4^2/12 + M4(R4)*(l4/2)^2
Jsum4(R4) := J6(R6) + JL6 + J5(R5) + J4(R4) + J6joint + J5joint
M4din(R4) := Jsum4(R4)*ε4
# Статика:
M4stat(R4) := M6(R6)*g*(l6/2 + l5 + l4) + ML*g*(l6 + l5 + l4) + M5(R5)*g*(l5/2 + l4) + M4(R4)*g*l4/2 + m6joint*g*(l5 + l4) + m5joint*g*l4
R4 := 0, 0.010 .. 0.050
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R4 := 0.02
m4joint := 4
# Расчет для 3 звена:
# Динамика:
J6(R6) := 1*M6(R6)*R6^2/4 + 1*M6(R6)*l6^2/12 + M6(R6)*(l6/2 + l5 + l4 + l3)^2
J6joint := m6joint*(l5 + l4 + l3)^2
J5joint := m5joint*(l4 + l3)^2
J4joint := m4joint*l3^2
JL6 := ML*(l6 + l5 + l4 + l3)^2
J5(R5) := 1*M5(R5)*R5^2/4 + 1*M5(R5)*l5^2/12 + M5(R5)*(l5/2 + l4 + l3)^2
J4(R4) := 1*M4(R4)*R4^2/4 + 1*M4(R4)*l4^2/12 + M4(R4)*(l4/2 + l3)^2
J3(R3) := 1*M3(R3)*R3^2/4 + 1*M3(R3)*l3^2/12 + M3(R3)*(l3/2)^2
Jsum3(R3) := J6(R6) + JL6 + J5(R5) + J4(R4) + J3(R3) + J6joint + J5joint + J4joint
M3din(R3) := Jsum3(R3)*ε3
# Статика:
M3stat(R3) := M6(R6)*g*(l6/2 + l5 + l4 + l3) + ML*g*(l6 + l5 + l4 + l3) + M5(R5)*g*(l5/2 + l4 + l3) + M4(R4)*g*(l4/2 + l3) + M3(R3)*g*l3/2 + m6joint*g*(l5 + l4 + l3) + m5joint*g*(l4 + l3) + m4joint*g*l3
R3 := 0, 0.010 .. 0.050
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R3 := 0.02
m3joint := 4
# Расчет для 2 звена:
# Динамика:
J6(R6) := 1*M6(R6)*R6^2/4 + 1*M6(R6)*l6^2/12 + M6(R6)*(l6/2 + l5 + l4 + l3 + l2)^2
J6joint := m6joint*(l5 + l4 + l3 + l2)^2
J5joint := m5joint*(l4 + l3 + l2)^2
J4joint := m4joint*(l3 + l2)^2
J3joint := m3joint*l2^2
JL6 := ML*(l6 + l5 + l4 + l3 + l2)^2
J5(R5) := 1*M5(R5)*R5^2/4 + 1*M5(R5)*l5^2/12 + M5(R5)*(l5/2 + l4 + l3 + l2)^2
J4(R4) := 1*M4(R4)*R4^2/4 + 1*M4(R4)*l4^2/12 + M4(R4)*(l4/2 + l3 + l2)^2
J3(R3) := 1*M3(R3)*R3^2/4 + 1*M3(R3)*l3^2/12 + M3(R3)*(l3/2 + l2)^2
J2(R2) := 1*M2(R2)*R2^2/4 + 1*M2(R2)*l2^2/12 + M2(R2)*(l2/2)^2
Jsum2(R2) := J6(R6) + JL6 + J5(R5) + J4(R4) + J3(R3) + J2(R2) + J6joint + J5joint + J4joint + J3joint
M2din(R2) := Jsum2(R2)*ε2
# Статика:
M2stat(R2) := M6(R6)*g*(l6/2 + l5 + l4 + l3 + l2) + ML*g*(l6 + l5 + l4 + l3 + l2) + M5(R5)*g*(l5/2 + l4 + l3 + l2) + M4(R4)*g*(l4/2 + l3 + l2) + M3(R3)*g*(l3/2 + l2) + M2(R2)*g*l2/2 + m6joint*g*(l5 + l4 + l3 + l2) + m5joint*g*(l4 + l3 + l2) + m4joint*g*(l3 + l2) + m3joint*g*l2
R2 := 0, 0.010 .. 0.050
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R2 := 0.02
m2joint := 4
# Расчет для 1 звена:
# Динамика:
J6(R6) := 1*M6(R6)*R6^2/4 + 1*M6(R6)*l6^2/12 + M6(R6)*(l6/2 + l5 + l4 + l3 + l2)^2
JL6 := ML*(l6 + l5 + l4 + l3 + l2)^2
J6joint := m6joint*(l5 + l4 + l3 + l2)^2
J5joint := m5joint*(l4 + l3 + l2)^2
J4joint := m4joint*(l3 + l2)^2
J3joint := m3joint*l2^2
J5(R5) := 1*M5(R5)*R5^2/4 + 1*M5(R5)*l5^2/12 + M5(R5)*(l5/2 + l4 + l3 + l2)^2
J4(R4) := 1*M4(R4)*R4^2/4 + 1*M4(R4)*l4^2/12 + M4(R4)*(l4/2 + l3 + l2)^2
J3(R3) := 1*M3(R3)*R3^2/4 + 1*M3(R3)*l3^2/12 + M3(R3)*(l3/2 + l2)^2
J2(R2) := 1*M2(R2)*R2^2/4 + 1*M2(R2)*l2^2/12 + M2(R2)*(l2/2)^2
J1(R1) := M1(R1)*R1^2
Jsum1(R1) := J6(R6) + JL6 + J5(R5) + J4(R4) + J3(R3) + J2(R2) + J1(R1) + (J6joint + J5joint + J4joint + J3joint)
M1din(R1) := Jsum1(R1)*ε1
# Статика:
M1stat(R1) := M6(R6)*g*(l6/2 + l5 + l4 + l3 + l2) + ML*g*(l6 + l5 + l4 + l3 + l2 + l1) + M5(R5)*g*(l5/2 + l4 + l3 + l2) + M4(R4)*g*(l4/2 + l3 + l2) + M3(R3)*g*(l3/2 + l2) + M2(R2)*g*(l2/2) + m6joint*g*(l5 + l4 + l3 + l2) + m5joint*g*(l4 + l3 + l2) + m4joint*g*(l3 + l2) + m3joint*g*l2
R1 := 0, 0.010 .. 0.050
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